# График влияния соотношения скоростей на угол наклона и относительный расход основного топлива
k == U_1/U_2
k1 :=
    for i ∈ 0 .. 50
        k1[i] ← 0
    k1
k :=
    for i ∈ 0 .. 50
        k[i] ← k1[i] + i/50
    k
alpha2 :=
    for i ∈ 0 .. last(k)
        alpha2[i] ← asin(k[i])/deg
    alpha2
# [plot: alpha2 vs k]
# [Excel component]
    excel["A1"] := k
    excel["B1"] := alpha2
# Относительный расход
m_отн :=
    for i ∈ 1 .. last(k)
        m_отн[i] ← 1/k[i]
    m_отн
# [plot: m_отн vs k]
# [Excel component]
    excel["A1"] := k
    excel["B1"] := m_отн
# График влияния соотношения диаметров и термодинамики топлив на общую термодинамику двигателя
x == d/D
x1 :=
    for i ∈ 0 .. 50
        x1[i] ← 0
    x1
x :=
    for i ∈ 0 .. 50
        x[i] ← x1[i] + i/500
    x
RT1 := 1
RT2 := [1; 0.8; 0.6; 0.4]
m_1отн :=
    for i ∈ 0 .. last(x)
        m_1отн[i] ← 1 - x[i]^2
    m_1отн
m_2отн :=
    for i ∈ 0 .. last(x)
        m_2отн[i] ← x[i]^2
    m_2отн
RT_сум1 :=
    for i ∈ 0 .. last(x)
        RT_сум1[i] ← RT1*m_1отн[i] + RT2[0]*m_2отн[i]
    RT_сум1
RT_сум2 :=
    for i ∈ 0 .. last(x)
        RT_сум2[i] ← RT1*m_1отн[i] + RT2[1]*m_2отн[i]
    RT_сум2
RT_сум3 :=
    for i ∈ 0 .. last(x)
        RT_сум3[i] ← RT1*m_1отн[i] + RT2[2]*m_2отн[i]
    RT_сум3
RT_сум4 :=
    for i ∈ 0 .. last(x)
        RT_сум4[i] ← RT1*m_1отн[i] + RT2[3]*m_2отн[i]
    RT_сум4
# [plot: RT_сум1, RT_сум2, RT_сум3, RT_сум4 vs x]
# [Excel component]
    excel["A1"] := x*1700
    excel["B1"] := RT_сум1
    excel["D1"] := RT_сум3
    excel["C1"] := RT_сум2
    excel["E1"] := RT_сум4
# Комплексное влияние параметров закона горения на относительный расход в широком диапазоне давлений
u_11 := 0.001
m == v_2/v_1
n == u_12/u_11
x == d/D == 0
v_1 := 0.2
m := [1; 2; 4]
n := [1; 2; 4]
p_k1 :=
    for i ∈ 0 .. 50
        p_k1[i] ← 1
    p_k1
p_k :=
    for i ∈ 0 .. 50
        p_k[i] ← p_k1[i] + i/5
    p_k
# m=1, n=1 | m=2, n=1
m1 :=
    for i ∈ 0 .. last(p_k)
        m1[i] ← n[0]*(p_k[i]*10^6/98066.5)^(v_1*(m[0] - 1))
    m1
m4 :=
    for i ∈ 0 .. last(p_k)
        m4[i] ← n[0]*(p_k[i]*10^6/98066.5)^(v_1*(m[1] - 1))
    m4
# m=1, n=2 | m=2, n=2
m2 :=
    for i ∈ 0 .. last(p_k)
        m2[i] ← n[1]*(p_k[i]*10^6/98066.5)^(v_1*(m[0] - 1))
    m2
m5 :=
    for i ∈ 0 .. last(p_k)
        m5[i] ← n[1]*(p_k[i]*10^6/98066.5)^(v_1*(m[1] - 1))
    m5
# m=1, n=4 | m=2, n=4
m3 :=
    for i ∈ 0 .. last(p_k)
        m3[i] ← n[2]*(p_k[i]*10^6/98066.5)^(v_1*(m[0] - 1))
    m3
m6 :=
    for i ∈ 0 .. last(p_k)
        m6[i] ← n[2]*(p_k[i]*10^6/98066.5)^(v_1*(m[1] - 1))
    m6
# m=4, n=1
m7 :=
    for i ∈ 0 .. last(p_k)
        m7[i] ← n[0]*(p_k[i]*10^6/98066.5)^(v_1*(m[2] - 1))
    m7
# m=4, n=2
m8 :=
    for i ∈ 0 .. last(p_k)
        m8[i] ← n[1]*(p_k[i]*10^6/98066.5)^(v_1*(m[2] - 1))
    m8
# m=4, n=4
m9 :=
    for i ∈ 0 .. last(p_k)
        m9[i] ← n[2]*(p_k[i]*10^6/98066.5)^(v_1*(m[2] - 1))
    m9
# [plot: m1, m2, m3, m4, m5, m6, m7, m8, m9 vs p_k]
File := READEXCEL("..\1. Выбор заряда\Расчеты в Терре для всех топлив\1. Топлива.xlsx", "Sheet1!A1:U9")
# [Excel component]
    excel["A1"] := File
D := 0.5 m
d := 0.02 m = 20 mm
p_k1 :=
    for i ∈ 0 .. 50
        p_k1[i] ← 3*MPa
    p_k1
p_к :=
    for i ∈ 0 .. 50
        p_к[i] ← p_k1[i] + i/12.5*MPa
    p_к
